<?xml version="1.0"?>
<!--
  File:     RD-33.xml
  Author:   Aero-Matic v 0.81

  Inputs:
    name:           RD-33
    type:           turbine
    thrust:         11110.858317414 lb
    augmented?      yes
    injected?       no
-->

<turbine_engine name="RD-33">
  <milthrust> 11110.9 </milthrust>
  <maxthrust> 18298.3 </maxthrust>
  <bypassratio>     0.47 </bypassratio>
  <tsfc>            0.77 </tsfc>
  <atsfc>           1.86 </atsfc>
  <bleed>           0.03</bleed>
  <idlen1>         43.5 </idlen1>
  <idlen2>         67.5 </idlen2>
  <maxn1>         100.0 </maxn1>
  <maxn2>         100.0 </maxn2>
  <augmented>         1 </augmented>
  <augmethod>         2 </augmethod>
  <injected>          0 </injected>

  <function name="IdleThrust"><!--0.0488-->
   <table>
    <independentVar lookup="row">velocities/mach</independentVar>
    <independentVar lookup="column">atmosphere/density-altitude</independentVar>
    <tableData>
         -10000     0     10000   20000   30000   40000   50000
     0.0  0.0315  0.0357  0.0386  0.0508  0.0658  0.0866  0.1074
     0.2  0.0366  0.0367  0.0245  0.0398  0.0583  0.0768  0.0982
     0.4  0.0029  0.0034  0.0015  0.0199  0.0435  0.0652  0.0880
     0.6  0.0     0.0     0.0     0.0     0.0202  0.0525  0.0785
     0.8  0.0     0.0     0.0     0.0     0.0347  0.0635  0.0659
     1.0  0.0     0.0     0.0     0.0     0.0     0.0404  0.0585
    </tableData>
   </table>
  </function>

  <function name="MilThrust">
   <table>
    <independentVar lookup="row">velocities/mach</independentVar>
    <independentVar lookup="column">atmosphere/density-altitude</independentVar>
    <tableData>
               0   3289    9868    16447   26315   36184   42763   70000   100000
     0.0   0.9623  0.8185  0.6077  0.4544  0.3175  0.1988  0.1468  0.0734  0.0367
     0.1   0.9425  0.8135  0.6171  0.4643  0.3208  0.2172  0.1488  0.0744  0.0372
     0.2   0.9201  0.8105  0.6198  0.4712  0.3229  0.2249  0.1498  0.0749  0.0374
     0.3   0.9048  0.8095  0.6284  0.4794  0.3289  0.2290  0.1597  0.0798  0.0399
     0.4   0.8973  0.8109  0.6349  0.4936  0.3364  0.2372  0.1647  0.0823  0.0411
     0.5   0.9048  0.8182  0.6512  0.5099  0.3404  0.2452  0.1694  0.0847  0.0423
     0.6   0.9176  0.8371  0.6706  0.5343  0.3683  0.2545  0.1770  0.0885  0.0442
     0.7   0.9405  0.8681  0.7059  0.5615  0.3885  0.2674  0.1865  0.0932  0.0466
     0.8   0.9683  0.9054  0.7381  0.5952  0.4171  0.2847  0.1988  0.0994  0.0497
     0.9   1.0055  0.9435  0.7881  0.6324  0.4484  0.3046  0.2135  0.1067  0.0533
     1.0   1.0417  0.9841  0.8333  0.6786  0.4906  0.3310  0.2307  0.1153  0.0576
     1.1   1.0813  1.0020  0.8681  0.7261  0.5392  0.3627  0.2523  0.1231  0.0615
     1.2   1.0813  1.0341  0.8929  0.7802  0.5802  0.3968  0.2769  0.1384  0.0692
     1.3   1.0813  1.0341  0.9052  0.8170  0.6241  0.4421  0.3061  0.1530  0.0765
     1.4   1.0813  1.0341  0.9175  0.8277  0.6651  0.4831  0.3286  0.1643  0.0821
     1.5   1.0813  1.0341  0.9268  0.8329  0.7018  0.5201  0.3513  0.1756  0.0878
     1.6   1.0813  1.0341  0.9268  0.8348  0.6987  0.5560  0.3782  0.1891  0.0945
     1.7   1.0813  1.0341  0.9268  0.8348  0.7020  0.5823  0.3968  0.1984  0.0992
     1.8   1.0813  1.0341  0.9268  0.8348  0.7026  0.5893  0.4033  0.2016  0.1008
     1.9   1.0813  1.0341  0.9268  0.8348  0.7009  0.5913  0.4116  0.2058  0.1029
     2.0   1.0813  1.0341  0.9268  0.8348  0.6966  0.5899  0.4108  0.2054  0.1027
     2.1   1.0813  1.0341  0.9268  0.8348  0.6966  0.5863  0.4078  0.2034  0.1017
     2.2   1.0813  1.0341  0.9268  0.8348  0.6966  0.5794  0.3927  0.1963  0.0981
    </tableData>
   </table>
  </function>

  <function name="AugThrust">
   <table>
    <independentVar lookup="row">velocities/mach</independentVar>
    <independentVar lookup="column">atmosphere/density-altitude</independentVar>
    <tableData>
                0   3289    9868    16447   26315   36184   42763   70000   100000
     0.0    0.9638  0.8289  0.6417  0.4995  0.3614  0.2409  0.1606  0.0803  0.0401
     0.1    0.9447  0.8297  0.6495  0.5045  0.3667  0.2461  0.1669  0.0834  0.0417
     0.2    0.9269  0.8376  0.6591  0.5120  0.3719  0.2533  0.1742  0.0871  0.0435
     0.3    0.9264  0.8521  0.6752  0.5296  0.3811  0.2540  0.1807  0.0903  0.0451
     0.4    0.9454  0.8722  0.6973  0.5586  0.3929  0.2593  0.1882  0.0941  0.047
     0.5    0.9839  0.9036  0.7271  0.5865  0.4112  0.2724  0.2020  0.101   0.05
     0.6    1.0471  0.9447  0.7726  0.6181  0.4361  0.2907  0.2161  0.108   0.05
     0.7    1.0925  0.9889  0.8297  0.6563  0.4636  0.3121  0.2305  0.1152  0.0576
     0.8    1.1528  1.0384  0.8832  0.7045  0.4950  0.3413  0.2514  0.1257  0.0628
     0.9    1.2240  1.1117  0.9502  0.7505  0.5369  0.3719  0.2737  0.1368  0.0684
     1.0    1.2939  1.1884  1.0215  0.8105  0.5914  0.4080  0.3012  0.1506  0.0753
     1.1    1.3597  1.2650  1.0953  0.8774  0.6544  0.4532  0.3368  0.1684  0.0842
     1.2    1.3597  1.3581  1.1692  0.9671  0.7229  0.4976  0.3729  0.1864  0.0932
     1.3    1.3597  1.4458  1.2650  1.0679  0.7941  0.5613  0.4138  0.2069  0.1034
     1.4    1.3597  1.4458  1.3253  1.1500  0.8774  0.6207  0.4610  0.2305  0.1152
     1.5    1.3597  1.4458  1.3253  1.2185  0.9584  0.6902  0.5070  0.2535  0.1267
     1.6    1.3597  1.4458  1.3253  1.2763  1.0241  0.7630  0.5551  0.2775  0.1387
     1.7    1.3597  1.4458  1.3253  1.3127  1.0802  0.8329  0.5981  0.2990  0.1495
     1.8    1.3597  1.4458  1.3253  1.3127  1.1262  0.8748  0.6353  0.3176  0.1588
     1.9    1.3597  1.4458  1.3253  1.3127  1.1733  0.9146  0.6679  0.3339  0.1669
     2.0    1.3597  1.4458  1.3253  1.3127  1.2108  0.9488  0.7037  0.3518  0.1759
     2.1    1.3597  1.4458  1.3253  1.3127  1.2108  0.9861  0.7352  0.3676  0.1838
     2.2    1.3597  1.4458  1.3253  1.3127  1.2108  1.0136  0.7622  0.3811  0.1905
     2.3    1.3597  1.4458  1.3253  1.3127  1.2108  1.0136  0.7886  0.3943  0.1971
    </tableData>
   </table>
  </function>

</turbine_engine>
